# Materialkennwerte
γ_M := 1.3  # Holzbau EC5
NKL := 2  # Überdachte, offene Tragwerke
KLED_C24 := "ständig"
# KVH C24 Gurte, Lattung
k_mod.C24 := 0.6  # EN 1995-1-1:2004/A1:2008 Tabelle 3.1, Zeile 3, Spalte 4
ρ_C24 := 350 kg/m^3
# Druck quer zur Faserrichtung
f_c.90.k := 2.5 N/mm^2
f_c.90.d := k_mod.C24*f_c.90.k/γ_M = 1.15385 N/mm^2
# OSB/3 Steg
ρ_OSB := 600 kg/m^3
# Konstruktionsparameter
l_Geb := 2*8.65 m = 17.3 m  # Länge Süd-Wand gesamter Baukörper
l_Giebel := 8.5 m  # Länge Giebelwand
h_Geb := 9.65 m  # Höhe
d_Fassade := 0.5 m  # Zuschlag für Fassadendicke
# Rasterabstand
e := 600 mm
# Optimal für Cedral.
# Prüfe Unterdeckplatte
# Steg OSB/3
t_OSB := 18 mm
# Dicke Einblasdämmung
# von Wand bis Dämmplatte
t_EB := 42 cm
# Lattung KVH
b := 60 mm
h := 60 mm
# Schwelle (Pos. N)
b_Schwelle := b = 60 mm
h_Schwelle := h = 60 mm
# Windlasten
# 34454 Bad Arolsen, Hessen, Windzone 1
# Vereinfachtes Verfahren, h<10m
# Ansatz einer luftdichten Bekleidung. Abmilderung DIN EN 1991-1-4 wird nicht in Anspruch genommen.
q_p := 0.50 kN/m^2  # SBT 3.27
# Wind von Norden / Süden, Last auf der Giebelseite
b_Wind := l_Geb + d_Fassade = 17.8 m
h_Geb = 9.65 m
d_Wind := d_Fassade + l_Giebel + d_Fassade = 9.5 m
e := min(b_Wind, 2*h_Geb) = 17.8 m
(d_Wind ≤ e) = 1
# Aufteilung in Bereich A (Fläche) und Bereich B (Eckbereich)
h_Geb/d_Wind = 1.01579
c_pe.10.A := -1.2
c_pe.1.A := -1.4
c_pe.10.B := -0.8
c_pe.1.B := -1.1
# Bei Nachweis der Verbindungsmittel und der Unterkonstruktion ist cpe.1 zu verwenden.
# Eckbereich
w_e.A := c_pe.1.A*q_p = -0.7 kN/m^2
l_A.Giebel := e/5 = 3.56 m
# Fläche
w_e.B := c_pe.1.B*q_p = -0.55 kN/m^2
l_B.Giebel := l_Giebel - 2*l_A.Giebel = 1.38 m
# Wind auf Giebelfläche, Last auf Nord/Süd
b_Wind := d_Fassade + l_Giebel + d_Fassade = 9.5 m
d_Wind := l_Geb + d_Fassade = 17.8 m
e := min(b_Wind, 2*h_Geb) = 9.5 m
h_Geb/d_Wind = 0.542135
# Eckbereich
w_e.A := c_pe.1.A*q_p = -0.7 kN/m^2
l_A.Nord := e/5 = 1.9 m
# Fläche
w_e.B := c_pe.1.B*q_p = -0.55 kN/m^2
l_B.Nord := l_Geb - 2*l_A.Nord = 13.5 m
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# Lastannahmen
g := 10 m/s^2
# Wandaufbau
# 1) Eternit Cedral in Stülpschalung
ρ_BP := 1300 kg/m^3  # Rohdichte, Eternit Planung und Anwendung 2017/04 S.24
h_BP := 190 mm  # Höhe Panel, S.27
t_BP := 10 mm  # Dicke Panel, S.27
ü_BP := 30 mm  # Überdeckung Stülpschalung
m_BP := 10.58 kg  # Gewicht pro Panel, S.27
n_BP := 0.57 m^2  # Nutzfläche pro Panel
g_BP.1 := m_BP/n_BP*g = 0.185614 kN/m^2
g_BP.2 := h_BP/(h_BP - ü_BP)*t_BP*ρ_BP*g = 0.154375 kN/m^2
g_BP := max(g_BP.1, g_BP.2) = 0.185614 kN/m^2
# 2) Lattung Hinterlüftungsebene 60/40
b_HL := 60 mm
h_HL := 40 mm
g_HL := b_HL*h_HL*ρ_C24/e*g = 0.000884211 kN/m^2
# 3) Dämmplatte
# Gutex Multitherm 40mm
d_DP := 40 mm
ρ_DP := 140 kg/m^3
g_DP := d_DP*ρ_DP*g = 0.056 kN/m^2
# Steico Universal 35mm
d_DP := 35 mm
ρ_DP := 270 kg/m^3
# DuH 2018: Genügt für
# Einblasdämmung bei e=600mm
g_DP := d_DP*ρ_DP*g = 0.0945 kN/m^2
# 4) Gurt außen 60/60
b_Gurt := 60 mm
l_Gurt := 60 mm
g_Gurt := b_Gurt*l_Gurt*ρ_C24/e*g = 0.00132632 kN/m^2
# 5) Einblasdämmung
# Steico Zell 35..45
ρ_EB := 45 kg/m^3
# Steico Floc 40..60
ρ_EB := 60 kg/m^3
# Isover Integra Einblaswolle 30..40
ρ_EB := 40 kg/m^3
t_EB = 42 cm
g_EB := ρ_EB*t_EB*g = 0.168 kN/m^2
# 6) OSB Steg
g_Steg := ρ_OSB*t_OSB*g = 0.108 kN/m^2
# 7) Gurt Wand C24 60/60
g_Gurt = 0.00132632 kN/m^2
g_k := g_BP + g_HL + g_DP + g_Gurt + g_EB + g_Steg + g_Gurt = 0.559651 kN/m^2
e_1 := b_Gurt/2 = 30 mm
m_k.1 := g_Gurt*e_1 = 0.0397895 N*m/m^2
e_2 := t_EB/2 = 210 mm
m_k.2 := g_EB*e_2 = 35.28 N*m/m^2
e_3 := t_EB - b_Gurt/2 = 390 mm
m_k.3 := g_Gurt*e_3 = 0.517263 N*m/m^2
e_4 := t_EB + d_DP/2 = 437.5 mm
m_k.4 := g_DP*e_4 = 41.3438 N*m/m^2
e_5 := t_EB + d_DP + h_HL/2 = 475 mm
m_k.5 := g_HL*e_5 = 0.42 N*m/m^2
e_6 := t_EB + d_DP + h_HL + 2*t_BP/2 = 505 mm  # Dicke Stülpschalung = 20mm
m_k.6 := g_BP*e_6 = 93.7351 N*m/m^2
m_k := m_k.1 + m_k.2 + m_k.3 + m_k.4 + m_k.5 + m_k.6 = 171.336 N*m/m^2
e_eq := m_k/g_k = 0.306148 m  # Equivalenter Hebelarm
# Zusatzlasten
# Fenster und Tür
# Lastannahmen nach RAL Leitfaden zur Montage 2014-04, Tabelle 5.3, Seite 104
g_Fe.Ra := (2.0 kg/m)*g = 0.02 kN/m  # PVC ohne Armierung, Zeile 3
g_Fe.Gl := (2.5 kg/(mm*m^2))*g = 0.025 kN/(mm*m^2)  # Glas, Zeile 6
# Verglasung 4-18-4-18-4
# Beispiel | 1.436*1.668
l_Rahmen := 2*(1.436 m + 1.668 m) = 6.208 m
A_Glas := 1.227 m*1.459 m = 1.79019 m^2
t_Glas := 3*8 mm = 24 mm
g_Fe.1 := A_Glas*t_Glas*g_Fe.Gl + l_Rahmen*g_Fe.Ra = 1.19828 kN
g_Fe.2 := 90.9 kg*g = 0.909 kN  # Rechnungsdokument
g_Fe := max(g_Fe.1, g_Fe.2) = 1.19828 kN
# Ungestörter Regelquerschnitt Nordwand
h := 3.70 m
e_eq = 0.306148 m
# Charakteristische Last Eigengewicht
g_k = 0.559651 kN/m^2
m_k = 171.336 N*m/m^2
γ_G := 1.35
# Je Doppelstegträger
F_V.d := γ_G*g_k*e_eq*h = 0.855823 kN
M_d := γ_G*m_k*e_eq*h = 0.262008 kN*m
# Bauaufsichtlich zugelassene Klammern
table  # each column defines a variable
    Kat | d_1 (mm) | d_2 (mm) | d_N (mm)
    "A: PZ" | 1.62 | 1.34 | 1.53
    "B: PQ" | 1.90 | 1.60 | 1.80
    "C" | 2.10 | 1.80 | 2.00
end table
# Kategorie A (Typ G, G5562, KG700, S4, S16)
# Kategorie B (Typ HD7500, Q6674)
# Kategorie C (Typ BKS, SD9100)
# Gewählte Klammer | TJEP PQZ-75
d_Kl.N := 1.80 mm
# PZ: G 5562
# PQ: 6674
l_Kl := 50 mm
# Beplankung OSB/3
ρ_OSB = 600 kg/m^3
t_OSB = 18 mm
# Lattung Gurt KVH
ρ_C24 = 350 kg/m^3
b = 6 cm
h = 3.7 m
# Materialwerte
NKL := 2
# Holzbau
γ_M := 1.3
NKL = 2
KLED_OSB := "ständig"
k_mod.OSB := 0.3  # EN 1995-1-1:2004/A1:2008 Tabelle NA.4
NKL = 2
KLED_C24 := "ständig"
k_mod.C24 := 0.6  # EN 1995-1-1:2004/A1:2008 Tabelle 3.1
# Beanspruchbarkeit Klammerverbindung (vereinfachtes Verfahren nach NA)
# Charakteristischer Wert der Lochleibungsfestigkeit OSB3-Platte (nicht vorgebohrt)
f_h.1.k := 65*d_Kl.N^-0.7*t_OSB^0.1*(N*mm^-1.4) = 57.5109 N/mm^2
# Charakteristischer Wert der Lochleibungsfestigkeit Schnittholz (nicht vorgebohrt)
f_h.2.k := 0.082*ρ_C24*d_Kl.N^-0.3*(10^12 mm^2.3/s^2) = 24.0603 N/mm^2
# Faktor beta
β := f_h.2.k/f_h.1.k = 0.41836
# Charakteristischer Wert Fließmoment
M_y.Rk := 240*d_Kl.N^2.6*(N*mm^-1.6) = 1.10642 N*m
# DIN EN 1995-1-1:2010-12
# EN 1995-1-1:2004 + AC:2006 + A1:2008 (D)
# Gl. 8.29
M_y.Rk := 150*d_Kl.N^3*(N*mm^-2) = 874.8 N*mm
# DIN EN 1995-1-1:2010-12
# EN 1995-1-1:2004/A2:2014 (D)
# Gl. 8.29
F_v.Rk := sqrt(2*M_y.Rk*f_h.1.k*d_Kl.N) = 425.579 N
# Abminderung wegen Unterschreitung Mindesteinbindetiefen
t_1 := t_OSB
t_1.req := 1.15*(2*sqrt(β/(1 + β)) + 2)*sqrt(M_y.Rk/(f_h.1.k*d_Kl.N)) = 10.3173 mm
t_2 := l_Kl - t_OSB
t_2.req := 1.15*(2*1/sqrt(1 + β) + 2)*sqrt(M_y.Rk/(f_h.2.k*d_Kl.N)) = 19.0167 mm
t_1/t_1.req = 1.74464
t_2/t_2.req = 1.68273
F_v.Rk := min(t_1/t_1.req, t_2/t_2.req, 1)*F_v.Rk = 425.579 N
# Faktor A für Nagelverbindung OSB-Platten
A := sqrt(2*β/(1 + β)) = 0.768063
# Sofern die OSB/3-Platte mindestens 7 d bei einschnittigen Verbindungen beträgt, kann der Faktor durch 0.8 ersetzt werden.
A := if(t_1 > 7*d_Kl.N, 0.8, A) = 0.8
k_mod.C24.OSB := sqrt(k_mod.C24*k_mod.OSB) = 0.424264
γ_M.St := 1.1
# Charakteristischer Wert der Tragfähigkeit pro Klammer
# Zwei Scherflächen, Abminderung 0.7 wegen Winkel der Klammer
F_v.Rk := 2*0.7*F_v.Rk = 595.811 N
# Bemessungswert der Tragfähigkeit pro Klammer
F_v.Rd := A*k_mod.C24.OSB*F_v.Rk/γ_M.St = 183.841 N
# Mindesklammerlänge
t_2.req := max(t_2.req, 15*d_Kl.N) = 27 mm
l_Kl := t_OSB + t_2.req = 45 mm
# Mindestklammerabstand
Θ := 30 deg
α := 0 deg
a_1.min := (10 + 5*cos(α))*d_Kl.N = 27 mm
# Maximaler Klammerabstand
a_1.max := 40*d_Kl.N = 72 mm
# Klammerabstand gewählt
s := 50 mm
if(s > a_1.min, "OK", "nicht OK") = "OK"
# Randabstände
# Klammern in Vollholz
ρ_C24 = 350 kg/m^3
a_4.t.Kl.C24 := (15 + 5*sin(α))*d_Kl.N = 27 mm
# Klammern in OSB
ρ_OSB = 600 kg/m^3
a_4.tKl.OSB := 7*d_Kl.N = 12.6 mm
# Belastbarkeit Schub
if(s < a_1.max, "OK", "nicht OK") = "OK"
s_v.d := 1/s*F_v.Rd = 3.67682 kN/m
e := 0.6 m
g := s_v.d/e = 6.12803 kN/m^2
# Verbrauch
v := 2*1/e*1/s = 66.6667 1/m^2
v*120 m^2 = 8000
# Dübel
# Fischer SXRL 10x160 FUS
d_nom := 10 mm
l_d := 160 mm
h_nom.2 := 70 mm
d_Sf := 18.5 mm
# Putzschicht
t_Putz := 10 mm
# Toleranzausgleich
t_Tol := 20 mm  # In Anlehnung an DIN 18516-1 6.1
# Anbauteil
h = 3700 mm
# Erforderliche Nutzlänge
t_Fix := t_Putz + t_Tol + h = 3730 mm
# Tatsächliche
# Verankerungstiefe
l_d - t_Fix = -3570 mm
# Bohrtiefe
h_1.2.min := 80 mm
# Schraube
# Biegung
M_Rk.s := 20.6 N*m
γ_Ms.M := 1.29
# Zug
N_Rk.s := 21.7 kN
γ_Ms.N := 1.55
# Schub
V_Rk.s := 10.8 kN
γ_Ms.V := 1.29
# Auszugsversuch
F_R.k.1 := 1.39 kN
γ_M := 2.5
F_R.d.1 := F_R.k.1/γ_M = 0.556 kN
γ_M.Last := 1.4
# Kopfdurchzug
n_ef := 1  # Effektive Anzahl Verbindungsmittel
f_head.k := 4.0 N/mm^2  # Kopfdurchziehparameter
d_h := 18.5 mm  # Kopfdurchmesser
F_ax.Rk := n_ef*f_head.k*d_h^2*(ρ_C24/(350 kg/m^3))^0.8 = 1.369 kN
k_mod.ax := (0.9 + 1.1)/2
# NKL2, KLED Wind
# Mittelwert aus "kurz" und "sehr kurz" bei Windlasten
γ_M.ax := 1.30  # Holz- und Holzwerkstoffe
F_ax.Rd := k_mod.ax*F_ax.Rk/γ_M.ax = 1.05308 kN
# Querbeanspruchung
# Biegung der Schraube
M_Rk.s = 20.6 N*m
t_Tol = 20 mm
t_Putz = 10 mm
a_3 := d_nom/2 = 5 mm
# ETAG 020 Annex C
# 5.2.2.3 Formel 4.1
e_1 := t_Putz + t_Tol + b_Gurt/2 = 60 mm
l_s := a_3 + e_1 = 65 mm
V_Rk.s := M_Rk.s/l_s = 0.316923 kN
# ETAG 020 Annex C
# 5.2.2.3 Formel 5.3a
V_Rd.s := V_Rk.s/γ_Ms.M = 0.245677 kN
# Mehrfachbefestigung
# Schwelle
# Schwellendruck Gurt (Pos. N) auf Schwelle (Pos. M)
# Beanspruchbarkeit der Schwelle infolge von Schwellendruck
l := b_Schwelle = 60 mm
h := h_Schwelle = 60 mm
l_1 := e = 0.6 m
k_c.90 := if(l_1 < 2*h, 1.00, 1.25) = 1.25
ü := min([30 mm; l; l_1/2]) = 30 mm
l_ef := l + 2*ü = 120 mm
A_ef := l_ef*b = 7200 mm^2
F_c.90.d := A_ef*k_c.90*f_c.90.d = 10.3846 kN
# Beanspruchbarkeit der Schwelle infolge von Knickung
# Nachweise
# Dübel
# Kopfdurchzug
F_1 := 100 N
η := F_1/F_ax.Rd = 0.0949598
F_ax.Rd = 1.05308 kN
# Querbeanspruchung
F_V.d = 0.855823 kN
s_Dübel := 0.5 m
η := F_V.d/((h/s_Dübel)*V_Rd.s) = 29.0294
V_Rd.s = 0.245677 kN
