# 1. Abmessungen
# Gegeben
# Gebäudeabmessungen
l_Giebel := 8.65 m  # Ohne Dämmung, aus Plan Müntinga
l_Traufe := 8.25 m*2 = 16.5 m
# Gesamtes Doppelhaus, ohne Dämmung,
# aus Plan Müntinga
h_First := 9.40 m  # Aus Plan Müntinga
# Gewählte Bauteile und Abmessungen
b_Schwelle := 60 mm
h_Schwelle := 60 mm  # Horizontale Schwelle
b_Gurt := 60 mm
h_Gurt := 60 mm  # Gurte
b_UG := b_Gurt
h_UG := h_Gurt  # Untergurt
b_OG := b_Gurt
h_OG := h_Gurt  # Obergurt
b_KL := 60 mm
h_KL := 40 mm  # Konterlatte Dachlatte 40x60
h_Fassade := 450 mm  # Gesamtmaß von Bestandsmauerwerk bis Ende Sockeldämmung
h_BP := 10 mm  # Cedral Beplankung
# Variable Parameter
h_DP := 35 mm
# Dicke Dämmplatte
# Steico universal dry
# Mindestdicke 35mm zum Ausblasen
e_Raster.B := 600 mm
# Konstruktionsraster auf Wandfläche
# Optimal 600mm wegen Beplankung Eternit Cedral
# Windlastbereich B
e_Raster.A := 400 mm
# Konstruktionsraster im Eckbereich
# Windlastbereich A
t_Steg := 12 mm  # Dicke Steg aus OSB/3, zwischen 12mm und 18mm
# Zwischenwerte
h_Steg := h_Fassade - h_DP = 415 mm  # Steg aus OSB
d_Fassade := 0.5 m  # Dicke der gesamten Fassade, für Windlast.
# 2. Materialkennwerte
# Holzbau EC5
γ_M := 1.3  # Holzbau EC5
NKL := 2  # Überdachte, offene Tragwerke
KLED_C24 := "ständig"
# KVH C24 S10: Schwelle, Gurte
k_mod.C24 := 0.6  # EN 1995-1-1:2004/A1:2008 Tabelle 3.1, Zeile 3, Spalte 4
ρ_C24 := 350 kg/m^3
# Biegung
f_m.k.C24 := 24.0 N/mm^2
f_m.d.C24 := k_mod.C24*f_m.k.C24/γ_M = 11.0769 N/mm^2
# Zug parallel zur Faserrichtung
f_t.0.k.C24 := 14.0 N/mm^2
f_t.0.d.C24 := k_mod.C24*f_t.0.k.C24/γ_M = 6.46154 N/mm^2
# Zug rechtwinklig zur Faserrichtung
f_t.90.k.C24 := 0.4 N/mm^2
f_t.90.d.C24 := k_mod.C24*f_t.90.k.C24/γ_M = 0.184615 N/mm^2
# Druck parallel zur Faserrichtung
f_c.0.k.C24 := 21.0 N/mm^2
f_c.0.d.C24 := k_mod.C24*f_c.0.k.C24/γ_M = 9.69231 N/mm^2
# Druck quer zur Faserrichtung
f_c.90.k.C24 := 2.5 N/mm^2
f_c.90.d.C24 := k_mod.C24*f_c.90.k.C24/γ_M = 1.15385 N/mm^2
# OSB/3: Steg
k_mod.OSB := 0.3  # EN 1995-1-1:2004/A1:2008 Tabelle NA.4
ρ_OSB := 600 kg/m^3
# Schub bei Scheibenbeanspruchung
f_v.k.OSB := 6.8 N/mm^2
f_v.d.OSB := k_mod.OSB*f_v.k.OSB/γ_M = 1.56923 N/mm^2
# Dämmplatte
ρ_DP.Steico.Universal.dry := 210 kg/m^3  # Steico universal dry 35mm / 40mm
ρ_DP.Steico.Universal := 270 kg/m^3  # Steico universal
ρ_DP := max(ρ_DP.Steico.Universal.dry, ρ_DP.Steico.Universal) = 270 kg/m^3
# 3. Lastannahmen
# 3.1 Windlasten
# 34454 Bad Arolsen, Hessen, Windzone 1
# Vereinfachtes Verfahren, h<10m
# Ansatz einer luftdichten Bekleidung. Abmilderung DIN EN 1991-1-4 wird nicht in Anspruch genommen.
# Windsperre im Eckbereich notwendig.
q_p := 0.50 kN/m^2  # SBT 3.27
# 3.1.1 Wind von Norden / Süden, Last auf der Giebelseite
b_Wind := l_Traufe + d_Fassade = 17 m  # Angeströmte Seite
d_Wind := d_Fassade + l_Giebel + d_Fassade = 9.65 m
h_First = 9.4 m
e := min(b_Wind, 2*h_First) = 17 m
(d_Wind ≤ e) = 1
# Aufteilung in Bereich A (Fläche) und Bereich B (Eckbereich)
h_First/d_Wind = 0.974093
c_pe.10.A := -1.2
c_pe.1.A := -1.4  # Außendruckbeiwerte SBT Tafel 3.31
c_pe.10.B := -0.8
c_pe.1.B := -1.1
# Bei Nachweis der Verbindungsmittel und der Unterkonstruktion ist zu verwenden.
c_pe.1
# Eckbereich A
w_e.A := c_pe.1.A*q_p = -0.7 kN/m^2
l_A.Giebel := e/5 = 3.4 m
# Fläche B
w_e.B := c_pe.1.B*q_p = -0.55 kN/m^2
l_B.Giebel := l_Giebel - 2*l_A.Giebel = 1.85 m
# 3.1.2 Wind auf Giebelfläche, Last auf Nord/Süd
b_Wind := d_Fassade + l_Giebel + d_Fassade = 9.65 m
d_Wind := l_Traufe + d_Fassade = 17 m
e := min(b_Wind, 2*h_First) = 9.65 m
h_First/d_Wind = 0.552941
# Eckbereich A
w_e.A := c_pe.1.A*q_p = -0.7 kN/m^2
l_A.Traufe := e/5 = 1.93 m
# Fläche B
w_e.B := c_pe.1.B*q_p = -0.55 kN/m^2
l_B.Traufe := l_Traufe - 2*l_A.Traufe = 12.64 m
w_e.A = -0.7 kN/m^2
w_e.B = -0.55 kN/m^2
w_e.A = -0.7 kN/m^2
l_A.Traufe = 1.93 m
l_B.Traufe = 12.64 m
l_A.Traufe = 1.93 m
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l_A.Giebel = 3.4 m
w_e.A = -0.7 kN/m^2
l_B.Giebel = 1.85 m
w_e.B = -0.55 kN/m^2
l_A.Giebel = 3.4 m
w_e.A = -0.7 kN/m^2
# 3.2 Schneelasten
# Vordach / Podest
# 3.3 Eigengewicht
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g := 10 m/s^2
h_UG = 60 mm
h_Steg = 415 mm
h_OG = 60 mm
h_DP = 35 mm
h_KL = 40 mm
h_BP = 10 mm
h_Fassade = 450 mm
g_UG := b_UG*h_UG*ρ_C24*g/e_Raster.A = 0.0315 kN/m^2
e_UG := h_UG/2 = 30 mm
g_Steg := t_Steg*h_Steg*ρ_OSB*g/e_Raster.A = 0.0747 kN/m^2
e_Steg := h_Steg/2 = 207.5 mm
# Obergurt
g_OG := b_OG*h_OG*ρ_C24*g/e_Raster.A = 0.0315 kN/m^2
e_OG := h_Steg - h_OG/2 = 385 mm
# Dämmplatte
g_DP := h_DP*ρ_DP*g = 0.0945 kN/m^2
e_DP := h_Steg + h_DP/2 = 432.5 mm
# Konterlattung
g_KL := b_KL*h_KL*ρ_C24*g/e_Raster.A = 0.021 kN/m^2
e_KL := h_Steg + h_DP + h_KL/2 = 470 mm
# Eternit Cedral in Stülpschalung
h_BP = 10 mm
ρ_BP := 1300 kg/m^3  # Rohdichte, Eternit Planung und Anwendung 2017/04 S.24
H_BP := 190 mm  # Höhe Panel, S.27
h_BP = 10 mm  # Dicke Panel, S.27
ü_BP := 30 mm  # Überdeckung Stülpschalung
m_BP := 10.58 kg  # Gewicht pro Panel, S.27
n_BP := 0.57 m^2  # Nutzfläche pro Panel
g_BP.1 := m_BP/n_BP*g = 0.185614 kN/m^2
g_BP.2 := H_BP/(H_BP - ü_BP)*h_BP*ρ_BP*g = 0.154375 kN/m^2
g_BP := max(g_BP.1, g_BP.2) = 0.185614 kN/m^2
e_BP := h_Steg + h_DP + h_KL + h_BP = 500 mm  # wegen Stülpschalung doppelter Hebelarm
# Dämmung
ρ_D := max(35, 45) kg/m^3  # Nenn-Rohdichte Steico Flex Wandanwendung
g_D := h_Steg*ρ_D*g = 0.18675 kN/m^2
e_D := h_Steg/2 = 207.5 mm
g_k := g_UG + g_Steg + g_OG + g_DP + g_KL + g_BP + g_D = 0.625564 kN/m^2
m_k := (g_UG*e_UG) + (g_Steg*e_Steg) + (g_OG*e_OG) + (g_KL*e_KL) + (g_BP*e_BP) + (g_D*e_D) = 0.17 kN*m/m^2
e_eq := m_k/g_k = 271.755 mm  # Äquivalenter Hebelarm / Schwerpunkt
# Zusatzlasten
# Fenster und Tür
# Lastannahmen nach RAL Leitfaden zur Montage 2014-04, Tabelle 5.3, Seite 104
g_Fe.Ra := (3.5 kg/m)*g = 0.035 kN/m  # PVC mit Armierung, Zeile 4
g_Fe.Gl := (2.5 kg/(mm*m^2))*g = 0.025 kN/(mm*m^2)  # Glas, Zeile 6
# Verglasung 4-18-4-18-4
b_Fenster := 1.429 m  # Abmessung Wohnzimmer aus Bestellung
h_Fenster := 1.500 m
l_Rahmen.Fenster := 2*(b_Fenster + h_Fenster) = 5.858 m
A_Glas.Fenster := b_Fenster*h_Fenster = 2.1435 m^2
t_Glas := 3*4 mm = 12 mm
g_Fe.1 := A_Glas.Fenster*t_Glas*g_Fe.Gl + l_Rahmen.Fenster*g_Fe.Ra = 0.84808 kN
b_Tür := 950 mm
h_Tür := 2020 mm
l_Rahmen.Tür := 2*(b_Tür + h_Tür) = 5.94 m
A_Glas.Tür := b_Tür*h_Tür = 1.919 m^2
g_Tü.1 := A_Glas.Tür*t_Glas*g_Fe.Gl + l_Rahmen.Tür*g_Fe.Ra = 0.7836 kN
g_Fe.k := max(g_Fe.1, g_Tü.1) = 0.84808 kN
# Podest
# 3.4 Verkehrslasten
# 4. Tragfähigkeiten
# 4.1 Schwelle: Druck
# Schwellendruck Gurt (Pos. N) auf Schwelle (Pos. M)
# Beanspruchbarkeit der Schwelle infolge von Schwellendruck
# Belastungsart: Druck quer zur Faserrichtung
l := b_Schwelle = 60 mm
h := h_Schwelle = 60 mm
l_1 := e_Raster.B = 600 mm
k_c.90 := if(l_1 < 2*h, 1.00, 1.25) = 1.25
ü := min([30 mm; l; l_1/2]) = 30 mm
l_ef := l + 2*ü = 120 mm
A_ef := l_ef*b_Schwelle = 7200 mm^2
f_c.90.d.C24 = 1.15385 N/mm^2
F_c.90.d := A_ef*k_c.90*f_c.90.d.C24 = 10.3846 kN
# 4.2 Gurt: Druck
# Belastungsart: Druck in Faserrichtung
f_c.0.d.C24 = 9.69231 N/mm^2
F_c.0.d := b_Gurt*h_Gurt*f_c.0.d.C24 = 34.8923 kN
# 4.3 Dübelverbindung Wand / Gurt
# Fischer SXRL 10x160 FUS
# Nenndurchmesser
d_nom := 10 mm
# Nennlänge
l_d := 160 mm
# Verankerungslänge
h_nom.2 := 70 mm
# Kopfdurchmesser
d_Sf := 18.5 mm
# Putzschicht
t_Putz := 10 mm
# Toleranzausgleich
t_Tol := 20 mm  # In Anlehnung an DIN 18516-1 6.1
# Anbauteil
h = 60 mm
# Erforderliche Nutzlänge
t_Fix := t_Putz + t_Tol + h = 90 mm
# Tatsächliche
# Verankerungstiefe
l_d - t_Fix = 70 mm
# Bohrtiefe
h_1.2.min := 80 mm
# Schraube
# Biegung
M_Rk.s := 20.6 N*m
γ_Ms.M := 1.29
# Zug
N_Rk.s := 21.7 kN
γ_Ms.N := 1.55
# Schub
V_Rk.s := 10.8 kN
γ_Ms.V := 1.29
# Auszugsversuch
F_R.k.1 := 1.39 kN
γ_M := 2.5
F_R.d.1 := F_R.k.1/γ_M = 0.556 kN
γ_M.Last := 1.4
# 4.3.1 Kopfdurchzug
# 4.3 Gurt: Biegung und Druck
# 4.4 Klammerverbindung Gurt / Steg
# 4.5 Steg: Schub
# 4.6 Klammerverbindung: Gurt / Dämmplatte
# 4.7 Schraubenverbindung: Gurt / Konterlattung
# 4.8 Schraubenverbindung: Konterlattung / Fassadenpanel
# 5. Belastungen
# Statik
# 6. Nachweise
# Randabstände Holz
