# Aufgabenstellung
# Abmessungen
# Tafelhöhe
h := 2.5 m
# Tafelbreite
l := 1.25 m
# Rippenbreite
h_1 := 5 cm
h_2 := h_1 = 5 cm
h_12 := h_1
# Rippentiefe
b_1 := 10 cm
b_2 := b_1 = 10 cm
b_12 := b_1
# Anzahl Rippen
n_R := 3
# Beidseitige Beplankung aus Gipskartonplatten
# ungestoßen nach DIN 18180
t_Gk := 12.5 mm
# Beidseitige Beplankung
n_Bp := 2
# Nagelverbindungen | 28/65
d_Na := 2.8 mm
l_Na := 65 mm
# Anzahl Nägel
n_N := 20  # (geschätzt)
# Lasten
# ständig
q_G.k := 5 kN/m
# veränderlich-kurz
q_Q.k := 15 kN/m
# veränderlich-kurz
# mit wechselndem Vorzeichen
F_Q.k := 2.7 kN
# Nutzungsklasse
NKL := 1
# Lasteinwirkung
KLED_Gk := "kurz"
KLED_C24 := "kurz"
# Bemessungswerte der Einwirkungen
# ständig
γ_G := 1.35
# veränderlich
γ_Q := 1.5
q_G.d := γ_G*q_G.k = 6.75 kN/m
q_Q.d := γ_Q*q_Q.k = 22.5 kN/m
q_d := q_G.d + q_Q.d = 29.25 kN/m
F_Q.d := γ_Q*F_Q.k = 4.05 kN
# Querschnittswerte
A_12 := b_12*h_12 = 50 cm^2
# Materialwerte
# Holzbau
γ_M := 1.3
NKL = 1
KLED_Gk = "kurz"
k_mod.Gk := 0.8  # EN 1995-1-1:2004/A1:2008 Tabelle NA.4, Zeile 3, Spalte 4
NKL = 1
KLED_C24 := "kurz"
k_mod.C24 := 0.9  # EN 1995-1-1:2004/A1:2008 Tabelle 3.1, Zeile 2, Spalte 7
# Charakteristische Werte der Baustofffestigkeiten | Bemessungswerte der Baustoffeigenschaften
# Rippen VH C24  nach EN 338
# C24 Druck in Faserrichtung
f_c.0.k := 21 N/mm^2
f_c.0.d := k_mod.C24*f_c.0.k/γ_M = 14.5385 N/mm^2
# C24 Druck quer zur Faserrichtung
f_c.90.k := 2.5 N/mm^2
f_c.90.d := k_mod.C24*f_c.90.k/γ_M = 1.73077 N/mm^2
# C24 Zug in Faserrichtung
f_t.0.k := 14.0 N/mm^2
f_t.0.d := k_mod.C24*f_t.0.k/γ_M = 9.69231 N/mm^2
# Beplankung Gipskartonplatte nach DIN 18180 Tabelle 6
# GKP Druck
f_c.Gk.k := 3.5 N/mm^2
f_c.Gk.d := k_mod.Gk*f_c.Gk.k/γ_M = 2.15385 N/mm^2
# GKP Schub
f_t.Gk.k := 1.0 N/mm^2
f_t.Gk.d := k_mod.Gk*f_t.Gk.k/γ_M = 0.615385 N/mm^2
# Beanspruchbarkeit der Nagelverbindung 28/65
# Mindestzugfestigkeit Nagel Draht
f_u.k := 600 N/mm^2
# Fließmoment Draht runde glattschaftige Nägel
M_y.Rk := 0.30*f_u.k*d_Na^2.6*(mm^0.4) = 2617.48 N·mm
# Lochleibungsfestigkeit Gipsplatten nach DIN 18180
f_h.1.k := 3.9*d_Na^-0.6*t_Gk^0.7*(1000^0.1*kN*m^-1.1) = 12.3199 N/mm  # NA.122
A := 1.1
F_v.Rk := A*sqrt(2*M_y.Rk*f_h.1.k*d_Na)*(sqrt(1000)*m^-0.5) = 467.446 N
# Erforderliche Dicke des Holzes (Einbindetiefe des Nagels)
t_C24.req := 9*d_Na = 25.2 mm
t_Na := l_Na - t_Gk = 52.5 mm
t_Na > t_C24.req = 1
# Erforderliche Dicke der Gipskartonplatte
t_Gk.req := 10*d_Na = 28 mm
t_Gk := min(t_Gk, t_Gk.req) = 12.5 mm
# Da die Dicke der Gipskartonplatte kleiner ist als die Mindestdicke wird der charakteristische Wert der Tragfähigkeit durch die Multiplikation mit dem Quotienten tGk / tGk.req ermittelt.
F_v.Rk := F_v.Rk*(t_Gk/t_Gk.req) = 208.681 N
# Bemessungswert der Tragfähigkeit der Nagelverbindung (Vereinfachtes Verfahren)
k_mod.C24 = 0.9
k_mod.Gk = 0.8
k_mod.C24.Gk := sqrt(k_mod.C24*k_mod.Gk) = 0.848528  # Gleichung NA. 114
γ_M.St := 1.1  # Gleichung NA. 114
F_v.Rd := k_mod.C24.Gk*F_v.Rk/γ_M.St = 160.975 N  # Gleichung NA. 113
# Beanspruchbarkeit Klammerverbindung
ρ_C24 := 350 kg/m^3
# Bauaufsichtlich zugelassene Klammern
# Kategorie A (Typ G, G5562, KG700, S4, S16)
table  # each column defines a variable
    Kat | d_1 (mm) | d_2 (mm) | d_N (mm)
    "A: PZ" | 1.62 | 1.34 | 1.53
    "B: PQ" | 1.90 | 1.60 | 1.80
    "C" | 2.10 | 1.80 | 2.00
end table
d_Kl.N := 1.80 mm
l_Kl := 50 mm
# Charakteristischer Wert der Lochleibungsfestigkeit Gipskartonplatte
f_h.1.k := 3.9*d_Kl.N^-0.6*t_Gk^0.7*(N*mm^-2.1) = 16.0597 N/mm^2
# Charakteristischer Wert der Lochleibungsfestigkeit Schnittholz (nicht vorgebohrt)
f_h.2.k := 0.082*ρ_C24*d_Kl.N^-0.3*(10^12 mm^2.3/s^2) = 24.0603 N/mm^2
# Faktor beta
β := f_h.2.k/f_h.1.k = 1.49817
# Charakteristischer Wert Fließmoment
M_y.Rk := 240*d_Kl.N^2.6*(N*mm^-1.6) = 1.10642 kN*mm
# DIN EN 1995-1-1:2010-12
# EN 1995-1-1:2004 + AC:2006 + A1:2008 (D)
# Gl. 8.29
M_y.Rk := 150*d_Kl.N^3*(N*mm^-2) = 874.8 N*mm
# DIN EN 1995-1-1:2010-12
# EN 1995-1-1:2004/A2:2014 (D)
# Gl. 8.29
# Mindestholzdicke Gipskarton
t_1.req := 1.15*(2*sqrt(β/(1 + β)) + 2)*sqrt(M_y.Rk/(f_h.1.k*d_Kl.N)) = 22.4507 mm
# Mindestholzdicke Vollholz
t_2.req := 1.15*(2*1/sqrt(1 + β) + 2)*sqrt(M_y.Rk/(f_h.2.k*d_Kl.N)) = 16.8771 mm
t_2.req.14 := 14*d_Kl.N = 25.2 mm  # Einbindetiefe sollte 14d betrage
# Charakteristische Wert der Tragfähigkeit pro Scherfläche
F_v.Rk := sqrt(2*β/(1 + β))*sqrt(2*M_y.Rk*f_h.1.k*d_Kl.N) = 246.297 N
# Eindringtiefe Klammer in Gipskartonplatte
t_1 := t_Gk
# Eindringtiefe Klammer in Vollholz
t_2 := l_Kl - t_Gk = 37.5 mm
# Abminderung wegen Unterschreitung Mindesteinbindetiefen
t_1/t_1.req = 0.556775
t_2/t_2.req = 2.22194
F_v.Rk := min(t_1/t_1.req, t_2/t_1.req, 1)*F_v.Rk = 137.132 N
# Charakteristischer Wert der Tragfähigkeit pro Klammer
# Zwei Scherflächen, Abminderung 0.7 wegen Winkel
F_v.Rk := 2*0.7*F_v.Rk = 191.985 N
# Bemessungswert der Tragfähigkeit pro Klammer
F_v.Rd := k_mod.C24.Gk*F_v.Rk/γ_M.St = 148.095 N
# Beanspruchbarkeit der Rippen/Beplankung bei vertikaler Belastung
# Beanspruchbarkeit der Rippe infolge von Knicken
β := 1.0  # Eulerfall 2
h = 250 cm
i_y := b_12/sqrt(12) = 2.88675 cm  # Trägheitsradius
l_ef := β*h = 2.5 m
λ := l_ef/i_y = 86.6025
k_c := 0.390  # Tabellen-Lookup !!!!!!!!!!!!!!
F_R.c.0.d := n_R*k_c*f_c.0.d*A_12 = 85.05 kN
# Beanspruchbarkeit der Rippen infolge von Schwellendruck
A_ef.1 := b_1*(h_1 + 3.0 cm) = 80 cm^2
A_ef.2 := b_2*(3.0 cm + h_2 + 3.0 cm) = 110 cm^2
l_1 := (l - (2*h_1 + h_2))/2 = 55 cm
2*h_1 = 10 cm
k_c.90 := if(l_1 ≥ 2*h_1, 1.25, 1) = 1.25  # VH aus NH
F_R.c.90.d := (2*A_ef.1 + A_ef.2)*k_c.90*f_c.90.d = 58.4135 kN
# Minimum: Beanspruchbarkeit der Rippen bei vertikaler Belastung
F_R.c.d := min([F_R.c.0.d; F_R.c.90.d]) = 58.4135 kN
# Beanspruchbarkeit der Beplankung bei vertikaler Belastung
# (1) Lala
a_v := l/n_N = 62.5 mm  # Verbindungsmittelabstand
f_v.Gk.90.d.1 := F_v.Rd/a_v = 2.36952 kN/m  # Nagelverbindung
# (2) Lala
k_v2 := 0.5
# ????????????????
f_v.Gk.90.d.2 := k_v2*f_c.Gk.d*t_Gk = 13.4615 kN/m
# (3) Lala
a_r := (l - h_1)/2 = 600 mm
f_v.Gk.90.d.3 := k_v2*f_c.Gk.d*20*t_Gk^2/a_r = 5.60897 kN/m
f_v.Gk.90.d := min([f_v.Gk.90.d.1; f_v.Gk.90.d.2; f_v.Gk.90.d.3]) = 2.36952 kN/m
F_B := n_Bp*f_v.Gk.90.d*l = 5.9238 kN
# Verteilung der vertikalen Belastung
# Die Beplankung trägt von der vertikalen Belastung:
η := F_B/F_R.c.90.d = 0.101412
# Rippenkräfte aus horizontaler Scheibenbeanspruchung
F_Q.d = 4.05 kN  # mit wechselndem Vorzeichen
F_c.Ed := F_Q.d*h/l = 8.1 kN
F_1.h.c := F_c.Ed = 8.1 kN
F_1.h.t := F_1.h.c = 8.1 kN
# Rippenkräfte aus vertikaler Scheibenbeanspruchung
# Die Streckenlast wird konzentriert über die Rippen eingeleitet. Die Rippen tragen (1-eta) der Vertikalbeanspruchung.
# Außenrippe (Index 1)
F_1.v.c := (1 - η)*q_d*l/4 = 8.21366 kN
# Innenrippe (Index 2)
F_2.v.c := (1 - η)*q_d*l/2 = 16.4273 kN
# Druck in Außenrippe (Index 1) aus vertikaler und horizontaler Scheibenbeanspruchung
N_1.c := F_1.h.c + F_1.v.c = 16.3137 kN
# Druck in Innenrippe (Index 2) aus vertikaler und horizontaler Scheibenbeanspruchung
N_2.c := F_2.v.c = 16.4273 kN
# Zug in Außenrippe
N_1.t := F_1.h.t = 8.1 kN
# Zug in Innenrippe
N_2.t := 0 kN
# Bemessungsmaßgebende Schwellenkräfte
# Rippenkräfte aus vertikaler und horizontaler Scheibenbeanspruchung
# Außenrippe
F_1 := max([N_1.c; N_1.t]) = 16.3137 kN
# Innenrippe
F_2 := max([N_2.c; N_2.t]) = 16.4273 kN
# Beanspruchbarkeit der Beplankung aus horizontaler Belastung (Schub)
a_v = 62.5 mm
k_v1 := 1.0
k_v2 = 0.5
c := 1.0
f_v.Gk.0.d.1 := k_v1*c*F_v.Rd/a_v = 2.36952 N/mm  # Verbindungsmittel
f_v.Gk.0.d.2 := k_v1*k_v2*f_t.Gk.d*t_Gk = 3.84615 N/mm
# Zug- bzw. Schubfestigkeit
# der Gipsplatte
f_v.Gk.0.d.3 := k_v1*k_v2*f_t.Gk.d*35*t_Gk^2/a_r = 2.80449 N/mm
# Schubbeulen der
# Gipsplatte
f_v.Gk.0.d := min([f_v.Gk.0.d.1; f_v.Gk.0.d.2; f_v.Gk.0.d.3]) = 2.36952 N/mm
# Maßgebende
# Beanspruchbarkeit
# Beanspruchbarkeit der Beplankung aus lotrechter Belastung
a_v = 62.5 mm
k_v2 = 0.5
f_v.Gk.90.d.1 := F_v.Rd/a_v = 2.36952 N/mm  # Verbindungsmittel
f_v.Gk.90.d.2 := k_v2*f_c.Gk.d*t_Gk = 13.4615 N/mm
f_v.Gk.90.d.3 := k_v2*f_c.Gk.d*20*t_Gk^2/a_r = 5.60897 N/mm
f_v.Gk.90.d := min([f_v.Gk.90.d.1; f_v.Gk.90.d.2; f_v.Gk.90.d.3]) = 2.36952 N/mm
# Bemessungswert des Schubflusses der einzelnen Beplankung aus horizontaler Scheibenbeanspruchung
s_v.0.d := (F_Q.d/n_Bp)/l = 1.62 N/mm
# Bemessungswert des Schubflusses der einzelnen Beplankung aus vertikaler Scheibenbeanspruchung
s_v.90.d := η*q_d*l/(n_Bp*l) = 1.48314 N/mm
# Tragfähigkeitsnachweise
# (1) Auf Zug beanspruchte Außenrippe
σ_t.0.d := N_1.t/A_12 = 1.62 N/mm^2
η_t.0.d := σ_t.0.d/f_t.0.d = 0.167143
if(η_t.0.d < 1.0, "OK", "nicht OK") = "OK"
# (2) Auf Druck beanspruchte Innenrippe
σ_c.0.d := F_2/A_12 = 3.28546 N/mm^2
η_c.0.d := σ_c.0.d/(k_c*f_c.0.d) = 0.579447
if(η_c.0.d < 1.0, "OK", "nicht OK") = "OK"
# (3) Schwellenpressung
σ_1.c.90.d := F_1/A_ef.1 = 2.03921 N/mm^2
σ_2.c.90.d := F_2/A_ef.2 = 1.49339 N/mm^2
σ_c.90.d := max([σ_1.c.90.d; σ_2.c.90.d]) = 2.03921 N/mm^2
η_c.90.d := σ_c.90.d/(k_c.90*f_c.90.d) = 0.942567
if(η_c.90.d < 1.0, "OK", "nicht OK") = "OK"
# (4) Scheibenbeanspruchung
η_v.0.d := s_v.0.d/f_v.Gk.0.d = 0.683682
if(η_v.0.d < 1.0, "OK", "nicht OK") = "OK"
η_v.90.d := s_v.90.d/f_v.Gk.90.d = 0.625926
if(η_v.90.d < 1.0, "OK", "nicht OK") = "OK"
