# Mehrfach Tragendes System
F_V.d := 2 kN
h := 3.5 m
e := 0.5 m
t_OSB := 15 mm
M := F_V.d*e = 1 kN*m
I := t_OSB*h^3/12 = 0.0535937 m^4
σ(z) := M/I*z
σ(h/2) = 0.0326531 N/mm^2
# [plot: z vs σ(z) (N/mm^2)]
n := 10  # Anzahl Verbindungsmittel
e_1 := h/n = 350 mm  # Verbindungsmittelabstand und Lasteinzugslänge
F_1 := σ(h/2 - e_1/2)*e_1*t_OSB = 0.154286 kN
